folder simulations: version=36; creator=Apsim 7.8-r3867
  simulation USsoybean
    metfile met: filename=Urbana_Champaign.met
    clock
      start_date = 01/01/2016  # Enter the start date of the simulation
      end_date = 24/12/2018  # Enter the end date of the simulation
    summaryfile
    area paddock
      Soil: Latitude=40.07; Longitude=-88.21; YearOfSampling=0
        InitialWater Initial water: FractionFull=1; PercentMethod=FilledFromTop; RelativeTo=ll15
        Water
          Thickness  BD    AirDry  LL15   DUL    SAT
          45         1.28  0.07    0.141  0.418  0.495063
          46         1.29  0.07    0.141  0.418  0.503851
          75         1.29  0.073   0.145  0.421  0.506025
          123        1.32  0.131   0.145  0.423  0.507475
          204        1.38  0.139   0.155  0.43   0.513032
          336        1.5   0.16    0.16   0.432  0.514251
          554        1.61  0.152   0.152  0.397  0.49869
          913        1.66  0.121   0.121  0.399  0.48641
          SoilCrop wheat: LL=[0.13, 0.13, 0.13, 0.14, 0.15, 0.13, 0.13, -]; KL=[0.1, 0.1, 0.08, 0.06, 0.04, 0.02, 0.01, -]; XF=[1, 1, 1, 1, 1, 1, 1, -]
          SoilCrop maize: LL=[0.13, 0.13, 0.13, 0.14, 0.15, 0.13, 0.13, -]; KL=[0.1, 0.1, 0.1, 0.08, 0.06, 0.04, 0.02, -]; XF=[1, 1, 1, 1, 1, 1, 1, -]
          SoilCrop soybean: LL=[0.141, 0.141, 0.145, 0.145, 0.155, 0.16, 0.152, 0.121]; KL=[0.1, 0.1, 0.08, 0.06, 0.04, 0.02, 0.01, 0.01]; XF=[1, 1, 1, 1, 1, 1, 1, 0]
        SoilWater: SummerCona=3.5; SummerU=6; SummerDate=1-jun; WinterCona=3.5; WinterU=6; WinterDate=1-dec; DiffusConst=40; DiffusSlope=16; Salb=0.23; CN2Bare=78; CNRed=20; CNCov=0.8; Thickness=[200, 200, 200, 200, 200, 200, 200, 200, 200]; SWCON=[0.2, 0.2, 0.2, 0.2, 0.2, 0.2, 0.2, 0.2, 0.2]
        SoilOrganicMatter: RootCN=40; RootWt=200; SoilCN=12.5; EnrACoeff=7.4; EnrBCoeff=0.2; OCUnits=Total
          Thickness  OC     FBiom  FInert
          45         0.893  0.025  0.4
          46         0.852  0.02   0.6
          75         0.899  0.015  0.8
          123        1.048  0.01   0.9
          204        1.127  0.01   0.95
          336        0.927  0.01   0.95
          554        0.824  0.01   0.95
        Analysis: PHUnits=Water; BoronUnits=HotWater
          Thickness  PH     ParticleSizeSand  ParticleSizeSilt  ParticleSizeClay
          45         8.059  45.93             37.8              16.27
          46         8.063  46.31             37.23             16.46
          75         8.038  47.25             35.8              16.95
          123        8.054  42.56             38.76             18.68
          204        7.978  34.99             37.51             27.5
          336        8.109  30.1              49.77             20.13
          554        8.301  34.4              44.63             20.97
        Sample InitialNitrogen: NO3Units=ppm; NH4Units=ppm; SWUnits=Volumetric; OCUnits=Total; PHUnits=Water
          Thickness  NO3  NH4
          45         0    0
          46         0    0
          75         0    0
          123        0    0
          204        0    0
          336        0    0
          554        0    0
      surfaceom SurfaceOrganicMatter
        PoolName = soybean  # Organic Matter pool name
        type = soybean  # Organic Matter type
        mass = 1000  # Initial surface residue (kg/ha)
        cnr = 80  # C:N ratio of initial residue
        standing_fraction = 0  # Fraction of residue standing
      fertiliser
      soybean
        ini: filename=Soybean.xml
      outputfile: filename=USsoybean.out; title=USsoybean
        variables
          variable:
            dd/mm/yyyy as Date
            yield
            Fsingle_spectral_toc as SIF_sim
        events Reporting Frequency: event=daily
      folder Manager folder
        manager Reset water, nitrogen, surfaceOM and phosphorus on fixed date
          # When should a reset be done
          reset_date = 14-may  # Enter date of reset (dd-mmm)
          # Reset details
          soilmodule = Soil  # Name of your soil module
          surfaceommodule = SurfaceOrganicMatter  # Name of your surface organic matter module
          pmodule =  # Name of your phosphorus module
          resetWater = yes  # Reset soil water?
          resetNitrogen = yes  # Reset soil nitrogen?
          resetSurfaceOM = yes  # Reset surface organic matter?
          resetP =  # Reset phosphorus?
          on start_of_day:
```
         if (today = date('[reset_date]')) then
            resetWater = '[resetWater]'
            resetNitrogen  = '[resetNitrogen]'
            resetSurfaceOM = '[resetSurfaceOM]'
            resetP = '[resetP]'
            if (resetWater = 'yes') then
                '[soilmodule] Water' reset
            endif
            if (resetNitrogen = 'yes') then
                '[soilmodule] Nitrogen' reset
            endif
            if (resetSurfaceOM = 'yes') then
                '[surfaceommodule]' reset
            endif
            if (resetP = 'yes') then
                '[pmodule]' reset
            endif
            act_mods reseting
         endif
```
        manager Sow on a fixed date
          # Sowing criteria
          date = 26-may-2016  # Enter sowing date (dd-mmm)
          # Sowing parameters
          crop = soybean  # Enter name of crop to sow
          density = 60  # Enter sowing density (plants/m2)
          depth = 30  # Enter sowing depth (mm)
          cultivar = davis  # Enter cultivar
          class = plant  # Enter crop growth class
          row_spacing = 400  # Enter row spacing (mm)
          on start_of_day:
```
        if (today = date('[date]') then
              [crop] sow plants =[density], sowing_depth = [depth], cultivar = [cultivar], row_spacing = [row_spacing], crop_class = [class]
         endif
```
        manager Fertilise on fixed date
          # When should fertiliser be applied
          fert_date = 15-jun  # Enter fertiliser date (dd-mmm)
          fert_criteria = 1000  # Don't add fertiliser if N in top 2 layers exceeds (kg/ha)
          # Fertiliser application details
          fertmodule = fertiliser  # Module used to apply the fertiliser
          fert_amount = 500  # Amount of fertiliser to apply (kg/ha)
          fert_type = NO3_N  # Fertiliser type
          on start_of_day:
```
         if (today = date('[fert_date]') then
            N_topsoil = no3(1) + nh4(1) + no3(2) + nh4(2)
            if (N_topsoil < [fert_criteria]) then
               [fertmodule] apply amount = [fert_amount] (kg/ha), depth = 50 (mm), type = [fert_type] ()
            endif
         endif
```
        manager Harvesting rule
          # Harvesting criteria
          crop = soybean  # Enter name of crop to harvest when ripe
          on end_of_day:
```
           if [crop].StageName = 'harvest_ripe' or [crop].plant_status = 'dead' then
              [crop]  harvest
              [crop]  end_crop
           endif
```
        manager Sow on a fixed date1
          # Sowing criteria
          date = 26-may-2017  # Enter sowing date (dd-mmm)
          # Sowing parameters
          crop = soybean  # Enter name of crop to sow
          density = 60  # Enter sowing density (plants/m2)
          depth = 30  # Enter sowing depth (mm)
          cultivar = davis  # Enter cultivar
          class = plant  # Enter crop growth class
          row_spacing = 400  # Enter row spacing (mm)
          on start_of_day:
          script: same as in USsoybean.paddock.Manager folder.Sow on a fixed date
        manager Sow on a fixed date2
          # Sowing criteria
          date = 10-may-2018  # Enter sowing date (dd-mmm)
          # Sowing parameters
          crop = soybean  # Enter name of crop to sow
          density = 60  # Enter sowing density (plants/m2)
          depth = 30  # Enter sowing depth (mm)
          cultivar = davis  # Enter cultivar
          class = plant  # Enter crop growth class
          row_spacing = 400  # Enter row spacing (mm)
          on start_of_day:
          script: same as in USsoybean.paddock.Manager folder.Sow on a fixed date
      manager2 Photosynthesis
        Vc = 1.1  # PM.Canopy.CPath.PsiVc
        J = 1.85  # PM.Canopy.CPath.PsiJ
        Rd = 0  # PM.Canopy.CPath.PsiRd
        Gm = 0.005296  # PM.Canopy.CPath.PsiGm
```csharp
using System;
using ModelFramework;
using LayerCanopyPhotosynthesis; 

 
public class Script 
{   
   [Param()] private double Vc;
   [Param()] private double J;
   [Param()] private double Rd;
   [Param()] private double Gm;
   [Link]  public Simulation MySimulation;
   [Link] Paddock MyPaddock; // Can be used to dynamically get access to simulation structure and variables
   [Input] DateTime Today;   // Equates to the value of the current simulation date - value comes from CLOCK
   [Output] public double[] dcaps = new double[4];
   
   //Additional Outputs
   [Output] public double BIOtotalDAY;
   [Output] public double BIOshootDAY;
   [Output] public double RootShoot;
   [Output] public double EcanDemand; 
   [Output] public double EcanSupply;
   [Output] public double RUE;
   [Output] public double TE; 
   [Output] public double RadIntDcaps; 
   
   
   
   
   public PhotosynthesisModel PM;
   public double LAITrigger;
   


   // The following event handler will be called once at the beginning of the simulation
   [EventHandler] public void OnInitialised()
   {
      string PhotosyntheticPathway = "C3"; //Change this to change pathway
            
      if(PhotosyntheticPathway == "C3")
      {
         PM = new LayerCanopyPhotosynthesis.PhotosynthesisModelC3();
         
         PM.Initialised = false;
         PM.photoPathway = LayerCanopyPhotosynthesis.PhotosynthesisModel.PhotoPathway.C3;

         PM.conductanceModel = LayerCanopyPhotosynthesis.PhotosynthesisModel.ConductanceModel.SIMPLE;
         PM.electronTransportModel = LayerCanopyPhotosynthesis.PhotosynthesisModel.ElectronTransportModel.EMPIRICAL;

         PM.Canopy.NLayers = 1;
         
         LAITrigger = 1.0;
         
         PM.B = 0.41;                                    //B-Biomass Conversion Coefficient
         PM.Canopy.LeafAngle = 60;                       //LeafAngle-Leaf Angle
         PM.Canopy.CPath.SLNRatioTop = 1.3;              //SLNRatioTop-SLNRatioTop
         
         PM.Canopy.CPath.PsiVc = Vc;                    //psiVc-Psi Vc 1.1
         PM.Canopy.CPath.PsiJ = J;                     //psiJ-Psi J 1.85
         PM.Canopy.CPath.PsiRd = Rd;                      //psiRd-Psi Rd
         
         PM.Canopy.CPath.PsiGm = Gm;               //0.005296
         PM.Canopy.CPath.CGm = 0.0;
         
         double PsiFactor = 1;                               //psiFactor-Psi Reduction Factor
         
         PM.Canopy.CPath.PsiVc *= PsiFactor;
         PM.Canopy.CPath.PsiJ *= PsiFactor;
         PM.Canopy.CPath.PsiRd *= PsiFactor;                   
         
         PM.Canopy.Ca = 370;                             //Ca-Atomospheric CO2 partial pressure
         PM.Canopy.CPath.CiCaRatio = 0.70;               //CiCaRatio-Ci/Ca Ratio (0 to calculate using Ci)
         PM.Canopy.CPath.StructuralN = 14;               //structuralN-Structural N
         PM.Canopy.Gbs_CO2 = 0.003;                      //gbs-Conductance to CO2 leakage from the bundle sheath to mesophyll
         
         PM.EnvModel.RPAR = 0.5;                         //R_PAR-Fraction of PAR energy to that of the total solar
         
         PM.Canopy.DiffuseExtCoeff = 0.78;               //kd_PAR-Diffuse PAR extinction coefficient
         PM.Canopy.DiffuseExtCoeffNIR = 0.8;             //kd_NIR-Diffuse NIR extinction coefficient
         PM.Canopy.LeafScatteringCoeff = 0.15;           //s_PAR-Leaf-level scattering coefficient for PAR
         PM.Canopy.LeafScatteringCoeffNIR = 0.8;         //s_NIR-Leaf-level scattering coefficient for NIR
         PM.Canopy.DiffuseReflectionCoeff = 0.036;       //rcd_PAR-Canopy-level reflection coefficient for diffuse PAR
         PM.Canopy.DiffuseReflectionCoeffNIR = 0.389;    //rcd_NIR-Canopy-level reflection coefficient for diffuse NIR
         
         PM.Canopy.OxygenPartialPressure = 210000;       //Ol-Oxygen partial pressure inside leaves in canopy
         
         PM.Canopy.U0 = 1.5;                               //u-Wind speed
         PM.Canopy.LeafWidth = 0.05;                     //wl-Leaf width
         PM.Canopy.Ku = 1.5;                             //kw-Wind speed profile distribution coefficient
         
         PM.Canopy.Theta = 0.7;                          //theta-empirical curvature factor
         PM.Canopy.F = 0.15;                             //f-spectral correction factor
         
         PM.Canopy.CPath.KcP25 = 273.422964228666;       //Kc_25-Michaelis Menten constants of Rubisco carboxylation at 25 degrees C
         PM.Canopy.CPath.KcTMin = 93720;                 //Kc_min-Minimum temperature of Kc
         
         PM.Canopy.CPath.KoP25 = 165824.064155384;       //Ko_25-Michaelis Menten constants of Rubisco oxygenation at 25 degrees C
         PM.Canopy.CPath.KoTMin = 33600;                 //Ko_min-Minimum temperature of Ko
         
         PM.Canopy.CPath.VcTMin = 65330;                 //Vcmax_min-Minimum temperature of Vcmax
         
         PM.Canopy.CPath.VcMax_VoMaxP25 = 4.59217066521612;    //VcmaxVomax_25-Vcmax/Vomax at 25 degrees C
         PM.Canopy.CPath.VcMax_VoMaxTMin = 35713.19871277176;   //VcmaxVomax_min-Minimum temperature of Vcmax/Vomax
         
         PM.Canopy.CPath.RdTMin = 46390;                 //Rd_min-Minimum temperature of Rd
       
         PM.Canopy.CPath.JTMin = 0.0;                    //Jmax_min-Minimum temperature of Jmax
         PM.Canopy.CPath.JTOpt = 30;                     //Jmax_opt-Optimum temperature of Jmax
         PM.Canopy.CPath.JTMax = 45;                     //Jmax_max-Maximum temperature of Jmax
         PM.Canopy.CPath.JMaxC = 0.911017958600129;      //Jmax_c-Scaling constant of Jamx
         PM.Canopy.CPath.JBeta = 1;                      //Jmax Beta value
         
       
         //PM.Canopy.CPath.GmP25 = 0.55;                   //gm_25-Mesophyll conductance for CO2 at 25 degrees C
         PM.Canopy.CPath.GmTMin = 0;                     //gm_min-Minimum temperature of gm
         PM.Canopy.CPath.GmTOpt = 29.2338417788683;                    //gm_opt-Optimum temperature of gm
         PM.Canopy.CPath.GmTMax = 45;                    //gm_max-Maximum temperature of gm
         PM.Canopy.CPath.GmC = 0.875790608584141;        //gm_c-Scaling constant of gm
         PM.Canopy.CPath.GmBeta = 1;                     //gm Beta value
         
      }
      else
      {
         PM = new LayerCanopyPhotosynthesis.PhotosynthesisModelC4();
         
         PM.Initialised = false;
         PM.photoPathway = LayerCanopyPhotosynthesis.PhotosynthesisModel.PhotoPathway.C4;

         PM.conductanceModel = LayerCanopyPhotosynthesis.PhotosynthesisModel.ConductanceModel.SIMPLE;
         PM.electronTransportModel = LayerCanopyPhotosynthesis.PhotosynthesisModel.ElectronTransportModel.EMPIRICAL;

         PM.Canopy.NLayers = 1;
         
         LAITrigger = 1;
         
         PM.B = 0.41;                                   //B-Biomass Conversion Coefficient
         
         PM.Canopy.LeafAngle = 60;                       //LeafAngle-Leaf Angle
         PM.Canopy.CPath.SLNRatioTop = 1.3;              //SLNRatioTop-SLNRatioTop
         
         PM.Canopy.CPath.PsiVc = 0.465;                  //psiVc-Psi Vc
         PM.Canopy.CPath.PsiJ = 2.7;                     //psiJ-Psi J
         PM.Canopy.CPath.PsiRd = 0;                      //psiRd-Psi Rd
         PM.Canopy.CPath.PsiVp = 1.55;                   //psiVp-Psi Vp (C4)
         
         PM.Canopy.CPath.PsiGm = 0;
         PM.Canopy.CPath.CGm = 1.2;
         
         double PsiFactor = 0.4;                         //psiFactor-Psi Reduction Factor
         
         PM.Canopy.CPath.PsiVc *= PsiFactor;
         PM.Canopy.CPath.PsiJ *= PsiFactor;
         PM.Canopy.CPath.PsiRd *= PsiFactor;
         PM.Canopy.CPath.PsiVp *= PsiFactor;
         
         
         PM.Canopy.Ca = 363;                             //Ca-Atomospheric CO2 partial pressure
         PM.Canopy.Vpr_l = 120;                          //Vpr-PEP regeneration rate per unit leaf area at 25°C (C4)
         PM.Canopy.CPath.CiCaRatio = 0.45;               //CiCaRatio-Ci/Ca Ratio (0 to calculate using Ci)
         PM.Canopy.CPath.StructuralN = 14;               //structuralN-Structural N
         
         PM.EnvModel.RPAR = 0.5;                         //R_PAR-Fraction of PAR energy to that of the total solar
         
         PM.Canopy.Gbs_CO2 = 0.003;                      //gbs-Conductance to CO2 leakage from the bundle sheath to mesophyll
         
         PM.Canopy.DiffuseExtCoeff = 0.78;               //kd_PAR-Diffuse PAR extinction coefficient
         PM.Canopy.DiffuseExtCoeffNIR = 0.8;             //kd_NIR-Diffuse NIR extinction coefficient
         PM.Canopy.LeafScatteringCoeff = 0.15;           //s_PAR-Leaf-level scattering coefficient for PAR
         PM.Canopy.LeafScatteringCoeffNIR = 0.8;         //s_NIR-Leaf-level scattering coefficient for NIR
         PM.Canopy.DiffuseReflectionCoeff = 0.036;       //rcd_PAR-Canopy-level reflection coefficient for diffuse PAR
         PM.Canopy.DiffuseReflectionCoeffNIR = 0.389;    //rcd_NIR-Canopy-level reflection coefficient for diffuse NIR
         
         PM.Canopy.OxygenPartialPressure = 210000;       //Ol-Oxygen partial pressure inside leaves in canopy
         
         PM.Canopy.U0 = 1.5;                               //u-Wind speed
         PM.Canopy.LeafWidth = 0.15;                     //wl-Leaf width
         PM.Canopy.Ku = 1.5;                             //kw-Wind speed profile distribution coefficient
         
         PM.Canopy.Theta = 0.7;                          //theta-empirical curvature factor
         PM.Canopy.F = 0.15;                             //f-spectral correction factor
         PM.Canopy.Alpha = 0.1;                          //alpha-fraction of PSII activity in the bundle sheath (C4)
         PM.Canopy.CPath.Phi = 2.0;                      //phi-extra energy (ATP) cost required from processes other than the C3 cycle
         PM.Canopy.X = PM.Canopy.CPath.Phi / (3 + PM.Canopy.CPath.Phi); //x-fraction of electron transport partitioned to mesophyll chloroplasts (C4)
         
         PM.Canopy.CPath.KcP25 = 1210;                   //Kc_25-Michaelis Menten constants of Rubisco carboxylation at 25 degrees C
         PM.Canopy.CPath.KcTMin = 64200;                 //Kc_min-Minimum temperature of Kc
         
         PM.Canopy.CPath.KoP25 = 292000;                 //Ko_25-Michaelis Menten constants of Rubisco oxygenation at 25 degrees C
         PM.Canopy.CPath.KoTMin = 10500;                 //Ko_min-Minimum temperature of Ko
            
         PM.Canopy.CPath.VcTMin = 78000;                 //Vcmax_min-Minimum temperature of Vcmax
          
         PM.Canopy.CPath.VcMax_VoMaxP25 = 5.51328906454566;    //VcmaxVomax_25-Vcmax/Vomax at 25 degrees C
         PM.Canopy.CPath.VcMax_VoMaxTMin = 21265.4029552906;   //VcmaxVomax_min-Minimum temperature of Vcmax/Vomax
           
         PM.Canopy.CPath.KpP25 = 75;                    //Kp_25-Michaelis-Menten constant of PEP carboxylation at 25 degrees C (C4)
         PM.Canopy.CPath.KpTMin = 36300;                 //Kp_min-Minimum temperature of Kp (C4)
            
         PM.Canopy.CPath.VpMaxTMin = 57043.2677590512;   //Vpmax_min-Minimum temperature of Vpmax (C4)
           
         PM.Canopy.CPath.RdTMin = 46390;                 //Rd_min-Minimum temperature of Rd
         
         PM.Canopy.CPath.JTMin = 0;                      //Jmax_min-Minimum temperature of Jmax
         PM.Canopy.CPath.JTOpt = 37.8649150880407;       //Jmax_opt-Optimum temperature of Jmax
         PM.Canopy.CPath.JTMax = 55;                     //Jmax_max-Maximum temperature of Jmax
         PM.Canopy.CPath.JMaxC = 0.711229539802063;      //Jmax_c-Scaling constant of Jamx
         PM.Canopy.CPath.JBeta = 1;
         
         //PM.Canopy.CPath.GmP25 = 1.2;                   //gm_25-Mesophyll conductance for CO2 at 25 degrees C
         PM.Canopy.CPath.GmTMin = 0;                     //gm_min-Minimum temperature of gm
         PM.Canopy.CPath.GmTOpt = 42;                    //gm_opt-Optimum temperature of gm
         PM.Canopy.CPath.GmTMax = 55;                    //gm_max-Maximum temperature of gm
         PM.Canopy.CPath.GmC = 0.462820450976839;        //gm_c-Scaling constant of gm
         PM.Canopy.CPath.GmBeta = 1;
         
          
        
      }
      //Set the LAI trigger
      MyPaddock.Set("laiTrigger", LAITrigger);
      //Set the LAI trigger
      MyPaddock.Set("laiTrigger", LAITrigger);
   }
   // This routine is called when the plant model wants us to do the calculation
   //[EventHandler] public void Ondodcaps(CalcDCaPType c) {
   [EventHandler] public void Ondodcaps() {
      //      ApsimC3PhotoLink p = new ApsimC3PhotoLink();
      //      dcap = p.Calc(c.doy, c.latitude, c.maxT, c.minT, c.radn, c.lai, c.sln, c.soilWaterAvail);
      //
      
      int DOY = 0;
      double latitude = 0;
      double maxT = 0;
      double minT = 0;
      double radn = 0;
      double RootShootRatio = 0;
      double SLNDCaPS = 0;
      double SWAvailable = 0;
      double lai = 0;
      double a=Math.Sqrt(9);
     
      MyPaddock.Get("DOY", out DOY);
      MyPaddock.Get("latitude", out latitude);
      MyPaddock.Get("maxT", out maxT);
      MyPaddock.Get("minT", out minT);
      MyPaddock.Get("radn", out radn);
      MyPaddock.Get("RootShootRatio", out RootShootRatio);
      MyPaddock.Get("SLN", out SLNDCaPS);
      MyPaddock.Get("SWAvailable", out SWAvailable);
      MyPaddock.Get("lai", out lai);
      
      //Check
      //            Console.WriteLine("DCaps Input Manager--------------");
      //            Console.WriteLine("DOY = " + DOY.ToString());
      //            Console.WriteLine("latitude = " + latitude.ToString());
      //            Console.WriteLine("maxT = " + maxT.ToString());
      //            Console.WriteLine("minT = " + minT.ToString());
      //            Console.WriteLine("radn = " + radn.ToString());
      //            Console.WriteLine("RootShootRatio = " + RootShootRatio.ToString());
      //            Console.WriteLine("SLNDCaPS = " + SLNDCaPS.ToString());
      //            Console.WriteLine("SWAvailable = " + SWAvailable.ToString());
      //            Console.WriteLine("lai = " + lai.ToString());
      //            Console.WriteLine("DCaps Input Manager--------------");
      
      //public override double[] RunApsim(int DOY, double latitude, double maxT, double minT, double radn, double lai, double SLNDCaPS, double soilWaterAvail, double RootShootRatio)
        
      dcaps = PM.RunApsim(DOY, latitude, maxT, minT, radn, lai, SLNDCaPS, SWAvailable, RootShootRatio);
      
      //Additional outputs
      RootShoot = RootShootRatio;
      BIOshootDAY = dcaps[0];
      BIOtotalDAY = BIOshootDAY * (1 + RootShoot);
      EcanDemand = dcaps[1]; 
      EcanSupply = dcaps[2];
      RadIntDcaps = dcaps[3];
      RUE = BIOshootDAY / RadIntDcaps;
      TE = BIOshootDAY / EcanSupply; 
      
      
      
      //Check Outputs
      //      Console.WriteLine("DCaps Out Manager--------------");
      //      Console.WriteLine("1 = " + dcaps[0].ToString());
      //      Console.WriteLine("2 = " + dcaps[1].ToString());
      //      Console.WriteLine("3 = " + dcaps[2].ToString());
      //      Console.WriteLine("4 = " + dcaps[3].ToString());
      //      Console.WriteLine("DCaps Out Manager--------------");
      //      
      
   }
   // After we've done the calculation, the result is here
      
   // Set its default value to garbage so that we find out quickly
   [EventHandler] public void OnPrepare()
   {
      for(int i = 0; i < 4; i++) { dcaps[i] = -1.0f;}
   }
}
```
        Reference
          ref = %apsim%/Model/DCaPST.dll  # Path to assembly
      manager2 FLUSPECT
        Cab = 28  # Chlorophyll AB content
        Cdm = 0.012  # Dry matter content
        Cw = 0.009  # Leaf water equivalent layer
        Cs = 0  # Scenecent material fraction
        Cca = 20  # Carotenoid content
        Cant = 0  # Anthocyanins
        N = 1.4  # Leaf thickness parameters
        single_spectral = 760  # The specific single wavelength of spectrum
```csharp
using System;
using ModelFramework;


  



   public class Script 
   {
   [Link]  public Simulation MySimulation;
   [Link] Paddock MyPaddock; // Can be used to dynamically get access to simulation structure and variables
   [Input] DateTime Today; 
   [Param()] private double Cab;
   [Param()] private double Cdm;
   [Param()] private double Cw;
   [Param()] private double Cs;
   [Param()] private double Cca;
   [Param()] private double Cant;
   [Param()] private double N;
   [Param()] int single_spectral;   
   
   [Output] public double ratio;
   [Output] public double [] ratioall=new double[211];
   
   
   
       [EventHandler] public void OnInitialised()
      
      {

         double[] fqe = new double[2] { 0.002, 0.01 };
            
         double[] nr = new double[2001]{1.5135,1.5131,1.5126,1.5121,1.5116,1.5111,1.5105,1.51,1.5095,1.5089,1.5084,1.5078,1.5073,1.5068,1.5062,1.5057,1.5052,1.5047,1.5043,1.5038,1.5034,1.503,1.5026,1.5023,1.502,1.5016,1.5013,1.5011,1.5008,1.5005,1.5003,1.5,1.4998,1.4995,1.4993,1.4991,1.4988,1.4986,1
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         double[] Kdm = new double[2001] { 110,104,98,92.4,87.1,82.3,78.1,74,70.1,66.5,63,59.5,56.2,53,50,47.2,44.6,42.2,40,37.8,35.7,33.6,31.7,29.9,28.3,26.8,25.4,24,22.8,21.5,20.2,19,17.9,16.8,15.8,14.8,13.9,13.1,12.3,11.6,11,10.4,9.92,9.41,8.95,8.51,8.09,7.64,7.27,6.94,6.66,6.42,6.22,6.01,5.78,5.
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         double[] Kab = new double[2001] { 0.064881,0.066732,0.068551,0.069982,0.0709,0.071333,0.07132,0.07126,0.071223,0.071228,0.071491,0.071888,0.072018,0.071827,0.071493,0.071132,0.070763,0.070437,0.070094,0.06984,0.069819,0.070054,0.070281,0.070503,0.070473,0.070528,0.070809,0.071312,0.071622,0
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         double[] Kca = new double[2001] { 0.16734,0.16761,0.16718,0.16721,0.16761,0.1676,0.16751,0.16743,0.16724,0.16668,0.16588,0.16552,0.16545,0.16569,0.16609,0.16619,0.16629,0.16646,0.16662,0.16687,0.16716,0.16754,0.16798,0.16844,0.1686,0.16847,0.16814,0.168,0.16773,0.16741,0.16755,0.16774,0.167
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         double[] Kw = new double[2001] {5.8e-05,5.85e-05,5.9e-05,5.99e-05,6.1e-05,6.2e-05,6.3e-05,6.4e-05,6.5e-05,6.6e-05,6.7e-05,6.79e-05,6.9e-05,7.05e-05,7.2e-05,7.31e-05,7.4e-05,7.49e-05,7.6e-05,7.74e-05,7.9e-05,8.06e-05,8.2e-05,8.3e-05,8.4e-05,8.55e-05,8.7e-05,8.8e-05,8.9e-05,9.05e-05,9.2e-05,9
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         double[] Ks = new double[2001] { 0.527,0.526,0.525,0.524,0.523,0.522,0.521,0.52,0.519,0.518,0.517,0.516,0.515,0.514,0.513,0.512,0.511,0.51,0.509,0.508,0.507,0.506,0.505,0.504,0.503,0.502,0.501,0.5,0.499,0.498,0.497,0.496,0.495,0.494,0.492,0.491,0.49,0.489,0.488,0.486,0.485,0.484,0.483,0.482
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         double[] Kant = new double[2001] {0.066675,0.064056,0.061933,0.059922,0.058277,0.056699,0.055366,0.054163,0.053116,0.05198,0.050951,0.050117,0.049387,0.048604,0.047876,0.047379,0.046899,0.046532,0.046157,0.045792,0.045429,0.045144,0.044845,0.044536,0.044249,0.044116,0.043958,0.043874,0.0438
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         double[] phiI = new double[2001] {0,0,0,0,0,0,0,0,0,0,0,0,0,0,0,0,0,0,0,0,0,0,0,0,0,0,0,0,0,0,0,0,0,0,0,0,0,0,0,0,0,0,0,0,0,0,0,0,0,0,0,0,0,0,0,0,0,0,0,0,0,0,0,0,0,0,0,0,0,0,0,0,0,0,0,0,0,0,0,0,0,0,0,0,0,0,0,0,0,0,0,0,0,0,0,0,0,0,0,0,0,0,0,0,0,0,0,0,0,0,0,0,0,0,0,0,0,0,0,0,0,0,0,0,0,0,0,0,0
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         double[] phiII = new double[2001] { 0,0,0,0,0,0,0,0,0,0,0,0,0,0,0,0,0,0,0,0,0,0,0,0,0,0,0,0,0,0,0,0,0,0,0,0,0,0,0,0,0,0,0,0,0,0,0,0,0,0,0,0,0,0,0,0,0,0,0,0,0,0,0,0,0,0,0,0,0,0,0,0,0,0,0,0,0,0,0,0,0,0,0,0,0,0,0,0,0,0,0,0,0,0,0,0,0,0,0,0,0,0,0,0,0,0,0,0,0,0,0,0,0,0,0,0,0,0,0,0,0,0,0,0,0,0,0,0
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         double[] Kall = new double[2001];
         int[] j = new int[2001];
         double[] t1 = new double[2001];
         double[] t2 = new double[2001];
         double[] tau = new double[2001];
         double[] kChlrel = new double[2001];
         double[] talf = new double[2001];
         double[] ralf = new double[2001];
         double[] t12 = new double[2001];
         double[] r12 = new double[2001];
         double[] t21 = new double[2001];
         double[] r21 = new double[2001];
         double[] denom = new double[2001];
         double[] Ta = new double[2001];
         double[] Ra = new double[2001];
         double[] t = new double[2001];
         double[] r = new double[2001];
         double[] D = new double[2001];
         double[] rq = new double[2001];
         double[] tq = new double[2001];
         double[] a = new double[2001];
         double[] b = new double[2001];
         double[] bNm1 = new double[2001];
         double[] bN2 = new double[2001];
         double[] a2 = new double[2001];            
         double[] Rsub = new double[2001];
         double[] Tsub = new double[2001];
         double[] tran = new double[2001];
         double[] refl = new double[2001];
         double[] Rb = new double[2001];
         double[] Z = new double[2001];
         double[] rho = new double[2001];
         bool[] I_rt = new bool[2001];
         double[] s = new double[2001];
         bool[] I_a = new bool[2001];
         double[] kk = new double[2001];
         double[] kChl = new double[2001];

         double ndub = 15;
         Script  myfun = new Script ();

         int i = 0;
         int jLength = 0;
        
         for(int k = 0;k < 2001;k++)
         {
            Kall[k] = (Cab * Kab[k] + Cca * Kca[k] + Cdm * Kdm[k] + Cw * Kw[k] + Cs * Ks[k] + Cant * Kant[k]) / N;
         }
         for(int k = 0;k < Kall.Length;k++)
         {
            if(Kall[k] > 0)
            {
               j[i++] = k;
                                    
            }
         }
         jLength = i;
         // Console.WriteLine(jLength);
         for (int k = 0; k < 2001; k++)
         {
            t1[k] = (1 - Kall[k]) * Math.Exp(-Kall[k]);
            t2[k] = Kall[k] * Kall[k] * myfun.exponentialintegralen(Kall[k], 1);
            // Console.WriteLine(t2[k]);
         }
         for (int k = 0; k < jLength; k++)
         {
            tau[k] = t1[j[k]] + t2[j[k]];
         }
         for (int k = 0; k < jLength; k++)
         {
            kChlrel[k] = Cab * Kab[j[k]] / (Kall[j[k]] * N);
         }
            
         talf = myfun.calctav(59, nr);            
         for (int k = 0; k < 2001; k++)
         {
            ralf[k] = 1 - talf[k];
         }
         t12 = myfun.calctav(90, nr);
         for (int k = 0; k < 2001; k++)
         {
            r12[k] = 1 - t12[k];
         }
         for (int k = 0; k < 2001; k++)
         {
            t21[k] = t12[k] / Math.Pow(nr[k], 2);
         }
         for (int k = 0; k < 2001; k++)
         {
            r21[k] = 1 - t21[k];
         }
         //top surface side
         for (int k = 0; k < 2001; k++)
         {
            denom[k] = 1 - r21[k] * r21[k] * tau[k] * tau[k];
         }
         for (int k = 0; k < 2001; k++)
         {
            Ta[k] = talf[k] * tau[k] * t21[k] / denom[k];
         }
         for (int k = 0; k < 2001; k++)
         {
            Ra[k] = ralf[k] + r21[k] * tau[k] * Ta[k];
         }
         //bottom surface side
         for (int k = 0; k < 2001; k++)
         {
            t[k] = t12[k] * tau[k] * t21[k] / denom[k];
         }
         for (int k = 0; k < 2001; k++)
         {
            r[k] = r12[k] + r21[k] * tau[k] * t[k];
         }
         //Stokes equations to compute properties of next N-1 layers (N real)
         for (int k = 0; k < 2001; k++)
         {
            D[k] = Math.Sqrt((1 + r[k] + t[k]) * (1 + r[k] - t[k]) * (1 - r[k] + t[k]) * (1 - r[k] - t[k]));
            rq[k] = r[k] * r[k];
            tq[k] = t[k] * t[k];
         }
         for (int k = 0; k < 2001; k++)
         {
            a[k] = (1 + rq[k] - tq[k] + D[k]) / (2 * r[k]);
            b[k] = (1 - rq[k] + tq[k] + D[k]) / (2 * t[k]);

         }
         for (int k = 0; k < 2001; k++)
         {
            bNm1[k] = Math.Pow(b[k], (N - 1));               
            bN2[k] = Math.Pow(bNm1[k], 2);
            a2[k] = Math.Pow(a[k], 2);
            denom[k] = a2[k] * bN2[k] - 1;
            Rsub[k] = a[k] * (bN2[k] - 1) / denom[k];
            Tsub[k] = bNm1[k] * (a2[k] - 1) / denom[k];
         }
         //Case of zero absorption
         i = 0;
         for (int k = 0; k < r.Length; k++)
         {
            if ((r[k] + t[k]) > 1)
            {
               j[i++] = k;

            }
         }
         jLength = i;
            
         // Console.WriteLine(jLength);
         for (int k = 0; k < jLength; k++)
         {
            Tsub[j[k]] = t[j[k]] / (t[j[k]] + (1 - t[j[k]]) * (N - 1));
            Rsub[j[k]] = 1 - Tsub[j[k]];
         }

         //Reflectance and transmittance of the leaf: combine top layer with next N-1 layers
         for (int k = 0; k < 2001; k++)
         {
            denom[k] = 1 - Rsub[k] * r[k];
            tran[k] = Ta[k] * Tsub[k] / denom[k];
            refl[k] = Ra[k] + Ta[k] * Rsub[k] * t[k] / denom[k];
            // Console.WriteLine(refl[k]);
         }
         //doubling method 
         for (int k = 0; k < 2001; k++)
         {
            Rb[k] = (refl[k] - ralf[k]) / (talf[k] * t21[k] + (refl[k] - ralf[k]) * r21[k]); 
            Z[k] = tran[k] * (1 - Rb[k] * r21[k]) / (talf[k] * t21[k]);  
            rho[k] = (Rb[k] - r21[k] * Z[k] * Z[k]) / (1 - Math.Pow((r21[k] * Z[k]), 2));
            tau[k] = (1 - Rb[k] * r21[k]) / (1 - Math.Pow((r21[k] * Z[k]), 2)) * Z[k];
            t[k] = tau[k];
            r[k] = Math.Max(rho[k], 0);
            //   Console.WriteLine(r[k]);
         }
         //Derive Kubelka-Munk s and k
         for (int k = 0; k < 2001; k++)
         {
            I_rt[k] = (r[k] + t[k]) < 1; 
            if(I_rt[k])
            {
               D[k] = Math.Sqrt((1 + r[k] + t[k]) * (1 + r[k] - t[k]) * (1 - r[k] + t[k]) * (1 - r[k] - t[k]));
               a[k] = (1 + r[k] * r[k] - t[k] * t[k] + D[k]) / (2 * r[k]);
               b[k] = (1 - r[k] * r[k] + t[k] * t[k] + D[k]) / (2 * t[k]);
               //Console.WriteLine(b[k]);
            }
            else
            {
               a[k] = 1;
               b[k] = 1;
            }
            // Console.WriteLine(b[k]);
         }
         for (int k = 0; k < 2001; k++)
         {
            s[k] = r[k] / t[k];
            kk[k] = Math.Log(b[k]);
            I_a[k] = (a[k] > 1) && (a[k] != double.PositiveInfinity);
            if (I_a[k])
            {
               s[k] = 2 * a[k] / (a[k] * a[k] - 1) * Math.Log(b[k]);
                    
               kk[k] = (a[k] - 1) / (a[k] + 1) * Math.Log(b[k]); 
            }
            kChl[k] = kChlrel[k] * kk[k];
            // Console.WriteLine(kChl[k]);

         }
            

         //Fluorescence of the leaf mesophyll layer
         int[] wle = new int[] { 400,401,402,403,404,405,406,407,408,409,410,411,412,413,414,415,416,417,418,419,420,421,422,423,424,425,426,427,428,429,430,431,432,433,434,435,436,437,438,439,440,441,442,443,444,445,446,447,448,449,450,451,452,453,454,455,456,457,458,459,460,461,462,463,464,465,466,467,468,469,470,471,472,473,474,475,476,477,478,479,480,481,482,483,484,485,486,487,488,489,490,491,492,493,494,495,496,497,498,499,500,501,502,503,504,505,506,507,508,509,510,511,512,513,514,515,516,517,518,519,520,521,522,523,524,525,526,527,528,529,530,531,532,533,534,535,536,537,538,539,540,541,542,543,544,545,546,547,548,549,550,551,552,553,554,555,556,557,558,559,560,561,562,563,564,565,566,567,568,569,570,571,572,573,574,575,576,577,578,579,580,581,582,583,584,585,586,587,588,589,590,591,592,593,594,595,596,597,598,599,600,601,602,603,604,605,606,607,608,609,610,611,612,613,614,615,616,617,618,619,620,621,622,623,624,625,626,627,628,629,630,631,632,633,634,635,636,637,638,639,640,641,642,643,644,645,646,647,648,649,650,651,652,653,654,655,656,657,658,659,660,661,662,663,664,665,666,667,668,669,670,671,672,673,674,675,676,677,678,679,680,681,682,683,684,685,686,687,688,689,690,691,692,693,694,695,696,697,698,699,700,701,702,703,704,705,706,707,708,709,710,711,712,713,714,715,716,717,718,719,720,721,722,723,724,725,726,727,728,729,730,731,732,733,734,735,736,737,738,739,740,741,742,743,744,745,746,747,748,749,750};
         int[] wlf = new int[] {640,641,642,643,644,645,646,647,648,649,650,651,652,653,654,655,656,657,658,659,660,661,662,663,664,665,666,667,668,669,670,671,672,673,674,675,676,677,678,679,680,681,682,683,684,685,686,687,688,689,690,691,692,693,694,695,696,697,698,699,700,701,702,703,704,705,706,707,708,709,710,711,712,713,714,715,716,717,718,719,720,721,722,723,724,725,726,727,728,729,730,731,732,733,734,735,736,737,738,739,740,741,742,743,744,745,746,747,748,749,750,751,752,753,754,755,756,757,758,759,760,761,762,763,764,765,766,767,768,769,770,771,772,773,774,775,776,777,778,779,780,781,782,783,784,785,786,787,788,789,790,791,792,793,794,795,796,797,798,799,800,801,802,803,804,805,806,807,808,809,810,811,812,813,814,815,816,817,818,819,820,821,822,823,824,825,826,827,828,829,830,831,832,833,834,835,836,837,838,839,840,841,842,843,844,845,846,847,848,849,850 };
         int[] wlp = new int[] {400,401,402,403,404,405,406,407,408,409,410,411,412,413,414,415,416,417,418,419,420,421,422,423,424,425,426,427,428,429,430,431,432,433,434,435,436,437,438,439,440,441,442,443,444,445,446,447,448,449,450,451,452,453,454,455,456,457,458,459,460,461,462,463,464,465,466,
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         int minwle = myfun.Min(wle);
            
         int maxwle = myfun.Max(wle);
         int minwlf = myfun.Min(wlf);
         int maxwlf = myfun.Max(wlf);
         // Console.WriteLine(maxwle);

         int[] Iwle = new int[351];
         int[] Iwlf = new int[211];
         i = 0;
         for (int k = 0; k < wlp.Length; k++)
         {
            if ((wlp[k] >= minwle) && (wlp[k] <= maxwle))
            {
               Iwle[i++] = k;
                    
               //Console.WriteLine(k);
            }
         }
         i = 0;
         for (int k = 0; k < wlp.Length; k++)
         {
            if ((wlp[k] >= minwlf) && (wlp[k] <= maxwlf))
            {
               Iwlf[i++] = k;                                     
            }
         }
            


         double[] te = new double[Iwle.Length];
         double[] tf = new double[Iwlf.Length];
         double[] re = new double[Iwle.Length];
         double[] rf = new double[Iwlf.Length];





         double[,] sigmoid = new double[211, 351];        
         double[,] MfI = new double[211, 351];
         double[,] MbI = new double[211, 351];
         double[,] MfII = new double[211, 351];
         double[,] MbII = new double[211, 351];

         double eps = Math.Pow(2, -ndub);
           
         for (int k = 0; k < Iwle.Length;k++ )
         {
            te[k] = 1 - (kk[Iwle[k]] + s[Iwle[k]]) * eps;
            // Console.WriteLine(te[k]);
         }
         


         for (int k = 0; k < Iwlf.Length; k++)
         {
            tf[k] = 1 - (kk[Iwlf[k]] + s[Iwlf[k]]) * eps;
            //Console.WriteLine(tf[k]);
         }
         for (int k = 0; k < Iwle.Length; k++)
         {
            re[k] = s[Iwle[k]] * eps;
            //Console.WriteLine(re[k]);
         }
         for (int k = 0; k < Iwlf.Length; k++)
         {
            rf[k] = s[Iwlf[k]] * eps;
            // Console.WriteLine(rf[k]);
         }
         for (int k = 0; k < 211; k++)
         {
            for (int k1 = 0; k1 < 351; k1++)
            {
               sigmoid[k, k1] = 1 / (1 + Math.Exp(-Convert.ToDouble(wlf[k]) / 10) * Math.Exp(Convert.ToDouble(wle[k1]) / 10));
               // Console.Write(string.Format("{0:N6}",sigmoid[k,k1])+" "); 
            }
            // Console.Write("******************************\n");
                
         }
            


         //Other factor .5 deleted, since these are the complete efficiencies for either PSI or PSII, not a linear combination
         for (int k = 0; k < Iwlf.Length; k++)
         {
            for (int k1 = 0; k1 < Iwle.Length; k1++)
            {
               MfI[k, k1] = fqe[0] * ((0.5 * phiI[Iwlf[k]]) * eps) * kChl[Iwle[k1]] * sigmoid[k, k1];
               // Console.Write(MfI[k, k1]+" ");                   
               
            }
            //Console.Write("*****************"+k+"*************\n");
            for (int k1 = 0; k1 < Iwle.Length; k1++)
            {
               MbI[k, k1] = fqe[0] * ((0.5 * phiI[Iwlf[k]]) * eps) * kChl[Iwle[k1]] * sigmoid[k, k1];
                   
            }
                
         }

            

         for (int k = 0; k < Iwlf.Length; k++)
         {
            for (int k1 = 0; k1 < Iwle.Length; k1++)
            {
               MfII[k, k1] = fqe[1] * ((0.5 * phiII[Iwlf[k]]) * eps) * kChl[Iwle[k1]] * sigmoid[k, k1];
               //     Console.Write(MfII[k, k1] + " ");
            }
            //  Console.Write("*****************" + k + "*************\n");
            for (int k1 = 0; k1 < Iwle.Length; k1++)
            {
               MbII[k, k1] = fqe[1] * ((0.5 * phiII[Iwlf[k]]) * eps) * kChl[Iwle[k1]] * sigmoid[k, k1];
            }

         }

         double[] Ih = new double[]{1,1,1,1,1,1,1,1,1,1,1,1,1,1,1,1,1,1,1,1,1,1,1,1,1,1,1,1,1,1,1,1,1,1,1,1,1,1,1,1,1,1,1,1,1,1,1,1,1,1,1,1,1,1,1,1,1,1,1,1,1,1,1,1,1,1,1,1,1,1,1,1,1,1,1,1,1,1,1,1,1,1,1,1,1,1,1,1,1,1,1,1,1,1,1,1,1,1,1,1,1,1,1,1,1,1,1,1,1,1,1,1,1,1,1,1,1,1,1,1,1,1,1,1,1,1,1,1,1,1,1,1,1,1,1,1,1,1,1,1,1,1,1,1,1,1,1,1,1,1,1,1,1,1,1,1,1,1,1,1,1,1,1,1,1,1,1,1,1,1,1,1,1,1,1,1,1,1,1,1,1,1,1,1,1,1,1,1,1,1,1,1,1,1,1,1,1,1,1,1,1,1,1,1,1,1,1,1,1,1,1,1,1,1,1,1,1,1,1,1,1,1,1,1,1,1,1,1,1,1,1,1,1,1,1,1,1,1,1,1,1,1,1,1,1,1,1,1,1,1,1,1,1,1,1,1,1,1,1,1,1,1,1,1,1,1,1,1,1,1,1,1,1,1,1,1,1,1,1,1,1,1,1,1,1,1,1,1,1,1,1,1,1,1,1,1,1,1,1,1,1,1,1,1,1,1,1,1,1,1,1,1,1,1,1,1,1,1,1,1,1,1,1,1,1,1,1,1,1,1,1,1,1,1,1,1,1,1,1,1,1,1,1,1,1,1,1,1,1,1,1};
         double[] Iv = new double[]{1,1,1,1,1,1,1,1,1,1,1,1,1,1,1,1,1,1,1,1,1,1,1,1,1,1,1,1,1,1,1,1,1,1,1,1,1,1,1,1,1,1,1,1,1,1,1,1,1,1,1,1,1,1,1,1,1,1,1,1,1,1,1,1,1,1,1,1,1,1,1,1,1,1,1,1,1,1,1,1,1,1,1,1,1,1,1,1,1,1,1,1,1,1,1,1,1,1,1,1,1,1,1,1,1,1,1,1,1,1,1,1,1,1,1,1,1,1,1,1,1,1,1,1,1,1,1,1,1,1,1,1,1,1,1,1,1,1,1,1,1,1,1,1,1,1,1,1,1,1,1,1,1,1,1,1,1,1,1,1,1,1,1,1,1,1,1,1,1,1,1,1,1,1,1,1,1,1,1,1,1,1,1,1,1,1,1,1,1,1,1,1,1,1,1,1,1,1,1,1,1,1,1,1,1,1,1,1,1,1,1};
            
         //Doubling routine
         for (int k2 = 0; k2 < ndub; k2++)
         {
            double[] xe = new double[te.Length];
            double[] ten = new double[te.Length];
            double[] ren = new double[te.Length];
            double[] xf = new double[tf.Length];
            double[] tfn = new double[tf.Length];
            double[] rfn = new double[tf.Length];

            for (int k = 0; k < te.Length; k++)
            {
               xe[k] = te[k] / (1 - re[k] * re[k]);
               ten[k] = te[k] * xe[k];
               ren[k] = re[k] * (1 + ten[k]);
               //Console.WriteLine(ren[k]);

            }


            for (int k = 0; k < tf.Length; k++)
            {
               xf[k] = tf[k] / (1 - rf[k] * rf[k]);
               tfn[k] = tf[k] * xf[k];
               rfn[k] = rf[k] * (1 + tfn[k]);
               // Console.WriteLine(rfn[k]);
            }
            double[,] A11 = new double[211, 351];
            double[,] A12 = new double[211, 351];
            double[,] A21 = new double[211, 351];
            double[,] A22 = new double[211, 351];
            for (int k = 0; k < 211; k++)
            {
               for (int k1 = 0; k1 < 351; k1++)
               {
                  A11[k, k1] = xf[k] * Ih[k1] + Iv[k] * xe[k1];
                  A12[k, k1] = (xf[k] * xe[k1]) * (rf[k] * Ih[k1] + Iv[k] * re[k1]);
                  A21[k, k1] = 1 + (xf[k] * xe[k1]) * (1 + rf[k] * re[k1]);
                  A22[k, k1] = (xf[k] * rf[k]) * Ih[k1] + Iv[k] * (xe[k1] * re[k1]);
                  // Console.WriteLine(A11[k,k1]);

               }
            }

               


            double[,] MfnI = new double[211, 351];
            double[,] MbnI = new double[211, 351];
            double[,] MfnII = new double[211, 351];
            double[,] MbnII = new double[211, 351];
                
            for (int k = 0; k < 211; k++)
            {
               for (int k1 = 0; k1 < 351; k1++)
               {
                  MfnI[k, k1] = MfI[k, k1] * A11[k, k1] + MbI[k, k1] * A12[k, k1];
                  MbnI[k, k1] = MbI[k, k1] * A21[k, k1] + MfI[k, k1] * A22[k, k1];
                  MfnII[k, k1] = MfII[k, k1] * A11[k, k1] + MbII[k, k1] * A12[k, k1];
                  MbnII[k, k1] = MbII[k, k1] * A21[k, k1] + MfII[k, k1] * A22[k, k1];
                  //Console.WriteLine(MfnI[k, k1]);
               }
            }
            te = ten; re = ren; tf = tfn; rf = rfn;
            MfI = MfnI; MbI = MbnI; MfII = MfnII; MbII = MbnII;
         }

            

            
         double[,] g1 = new double[211, 351];
         double[,] g2 = new double[211, 351];
         double[,] f1 = new double[211, 351];
         double[,] f2 = new double[211, 351];
         g1 = MbI; g2 = MbII; f1 = MfI; f2 = MfII;
         for (int k = 0; k < Rb.Length; k++)
         {
            Rb[k] = rho[k] + Math.Pow(tau[k], 2) * r21[k] / (1 - rho[k] * r21[k]);
            //Console.WriteLine(Rb[k]);
         }
         double[,] Xe = new double[211, 351];
         double[,] Xf = new double[211, 351];
         double[,] Ye = new double[211, 351];
         double[,] Yf = new double[211, 351];

         double[,] A = new double[211, 351];
         double[,] B = new double[211, 351];

         double[,] g1n = new double[211, 351];
         double[,] f1n = new double[211, 351];
         double[,] g2n = new double[211, 351];
         double[,] f2n = new double[211, 351];   


         for (int k = 0; k < 211;k++ )
         {
            for (int k1 = 0; k1 < 351;k1++ )
            {
               Xe[k, k1] = Iv[k] * (talf[Iwle[k1]] / (1 - r21[Iwle[k1]] * Rb[Iwle[k1]]));
               Xf[k, k1] = t21[Iwlf[k]] / (1 - r21[Iwlf[k]] * Rb[Iwlf[k]]) * Ih[k1];
               Ye[k, k1] = Iv[k] * (tau[Iwle[k1]] * r21[Iwle[k1]] / (1 - rho[Iwle[k1]] * r21[Iwle[k1]]));
               Yf[k, k1] = tau[Iwlf[k]] * r21[Iwlf[k]] / (1 - rho[Iwlf[k]] * r21[Iwlf[k]]) * Ih[k1];
               // Console.WriteLine(Yf[k, k1]);

            }              
         }
           
         for (int k = 0; k < 211; k++)
         {
            for (int k1 = 0; k1 < 351; k1++)
            {
               A[k, k1] = Xe[k, k1] * (1 + Ye[k, k1] * Yf[k, k1]) * Xf[k, k1];
               B[k, k1] = Xe[k, k1] * (Ye[k, k1] + Yf[k, k1]) * Xf[k, k1];
               // Console.WriteLine(A[k, k1]);
            }
         }
          

         for (int k = 0; k < 211; k++)
         {
            for (int k1 = 0; k1 < 351; k1++)
            {
               g1n[k, k1] = A[k, k1] * g1[k, k1] + B[k, k1] * f1[k, k1];
               f1n[k, k1] = A[k, k1] * f1[k, k1] + B[k, k1] * g1[k, k1];
               g2n[k, k1] = A[k, k1] * g2[k, k1] + B[k, k1] * f2[k, k1];
               f2n[k, k1] = A[k, k1] * f2[k, k1] + B[k, k1] * g2[k, k1];
               // Console.WriteLine(g1n[k, k1]);
            }
         }

           

            
         MbI = g1n;
         MbII = g2n;
         MfI = f1n;
         MfII = f2n;

         //my add
         double[] sum_MbI = new double[211];
         double[] sum_MbII = new double[211];
         double[] sum_MfI = new double[211];
         double[] sum_MfII = new double[211];
         double[] MM = new double[351];
         double[] sum_Mb = new double[211];
         double[] sum_Mf = new double[211];
         double[] sum_F = new double[211];


         double value1;
         double value2;
         
        


         for (int k = 0; k < 211; k++)
         {
            for (int k1 = 0; k1 < 351; k1++)
            {
               MM[k1] = MbI[k, k1];
            }
            sum_MbI[k] = myfun.Sum(MM);
            //Console.WriteLine(sum_MbI[k]);
         }
         for (int k = 0; k < 211; k++)
         {
            for (int k1 = 0; k1 < 351; k1++)
            {
               MM[k1] = MbII[k, k1];
            }
            sum_MbII[k] = myfun.Sum(MM);
            // Console.WriteLine(sum_MbII[k]);
         }
         for (int k = 0; k < 211; k++)
         {
            for (int k1 = 0; k1 < 351; k1++)
            {
               MM[k1] = MfI[k, k1];
            }
            sum_MfI[k] = myfun.Sum(MM);
            // Console.WriteLine(sum_MfI[k]);
         }
         for (int k = 0; k < 211; k++)
         {
            for (int k1 = 0; k1 < 351; k1++)
            {
               MM[k1] = MfII[k, k1];
            }
            sum_MfII[k] = myfun.Sum(MM);
            //  Console.WriteLine(sum_MfII[k]);
         }
         for (int k = 0; k < 211; k++)
         {
            sum_Mb[k] = sum_MbI[k] + sum_MbII[k];
            sum_Mf[k] = sum_MfI[k] + sum_MfII[k];
            sum_F[k] = sum_Mb[k] + sum_Mf[k];
            //   Console.WriteLine(sum_F[k]);
         }

         value1 = myfun.Sum(sum_F);
         //Console.WriteLine(value1);
         //Console.WriteLine(value1);
         value2 = sum_F[single_spectral - 640];
         ratio = value2 / value1;
         //Console.WriteLine(ratio);          
      for (int k = 0; k < 211; k++)
      {
         ratioall[k] = sum_F[k] / value1;
      
      }
            
           
            

         /* 输出每个数组元素的值 */

            

         
           
            
      }
        
      public double Sum(double[] Data)
      {
         double DataSum = 0;
         for (int i = 0; i < Data.Length; i++)
         {
            DataSum += Data[i];
         }
         return DataSum;
      }
      public int Max(int[] data)
      {
         int max = data[0];
         for(int i = 0;i < data.Length;i++)
         {
            if(data[i] > max)
            {
               max = data[i];
                   
            }
         }
         return max;
      }
      public int Min(int[] data)
      {
         int min = data[0];
         for (int i = 0; i < data.Length; i++)
         {
            if (data[i] < min)
            {
               min = data[i];

            }
         }
         return min;
      }
      public double[] calctav(int alfa, double [] nr)
      {
         double rd;
         double sa;
         double[] n2 = new double[2001];
         double[] np = new double[2001];
         double[] nm = new double[2001];
         double[] a = new double[2001];
         double[] k = new double[2001];
            
         double[] b1 = new double[2001];
         double[] b2 = new double[2001];
         double[] b = new double[2001];
         double[] b3 = new double[2001];
         double[] a3 = new double[2001];
         double[] ts = new double[2001];
         double[] tp1 = new double[2001];
         double[] tp2 = new double[2001];
         double[] tp3 = new double[2001];
         double[] tp4 = new double[2001];
         double[] tp5 = new double[2001];
         double[] tp = new double[2001];
         double[] tav = new double[2001];

         rd = Math.PI / 180;
         for (int i = 0; i < 2001; i++)
         {
            n2[i] = nr[i] * nr[i];
         }
         for (int i = 0; i < 2001; i++)
         {
            np[i] = n2[i] + 1;
         }
         for (int i = 0; i < 2001; i++)
         {
            nm[i] = n2[i] - 1;
         }
         for (int i = 0; i < 2001; i++)
         {
            a[i] = (nr[i] + 1) * (nr[i] + 1) / 2;
         }
         for (int i = 0; i < 2001; i++)
         {
            k[i] = -(n2[i] - 1) * (n2[i] - 1) / 4;
         }
         sa = Math.Sin(alfa * rd);

         for (int i = 0; i < 2001; i++)
         {
            if(alfa != 90)
            {
               b1[i] = Math.Sqrt((sa * sa - np[i] / 2) * (sa * sa - np[i] / 2) + k[i]);
            }
            else
            {
               b1[i] = 0;
            }
         }
         for (int i = 0; i < 2001; i++)
         {
            b2[i] = sa * sa - np[i] / 2;
         }
         for (int i = 0; i < 2001; i++)
         {
            b[i] = b1[i] - b2[i];
         }
         for (int i = 0; i < 2001; i++)
         {
            b3[i] = b[i] * b[i] * b[i];
         }
         for (int i = 0; i < 2001; i++)
         {
            a3[i] = a[i] * a[i] * a[i];
         }
         for (int i = 0; i < 2001; i++)
         {
            ts[i] = (k[i] * k[i] / (6 * b3[i]) + k[i] / b[i] - b[i] / 2) - (k[i] * k[i] / (6 * a3[i]) + k[i] / a[i] - a[i] / 2);
         }
         for (int i = 0; i < 2001; i++)
         {
            tp1[i] = -2 * n2[i] * (b[i] - a[i]) / (np[i] * np[i]);
         }
         for (int i = 0; i < 2001; i++)
         {
            tp2[i] = -2 * n2[i] * np[i] * Math.Log(b[i] / a[i]) / (nm[i] * nm[i]);
         }
         for (int i = 0; i < 2001; i++)
         {
            tp3[i] = n2[i] * (1 / b[i] - 1 / a[i]) / 2;
         }
         for (int i = 0; i < 2001; i++)
         {
            tp4[i] = 16 * n2[i] * n2[i] * (n2[i] * n2[i] + 1) * Math.Log((2 * np[i] * b[i] - nm[i] * nm[i]) / (2 * np[i] * a[i] - nm[i] * nm[i])) / (np[i] * np[i] * np[i] * nm[i] * nm[i]);
         }
         for (int i = 0; i < 2001; i++)
         {
            tp5[i] = 16 * Math.Pow(n2[i], 3) * (1 / (2 * np[i] * b[i] - Math.Pow(nm[i], 2)) - 1 / (2 * np[i] * a[i] - Math.Pow(nm[i], 2))) / Math.Pow(np[i], 3);
         }
         for (int i = 0; i < 2001; i++)
         {
            tp[i] = tp1[i] + tp2[i] + tp3[i] + tp4[i] + tp5[i];
         }
         for (int i = 0; i < 2001; i++)
         {
            tav[i] = (ts[i] + tp[i]) / (2 * sa * sa);
         }
         return tav;
      }
      public double exponentialintegralei(double x)
      {
         double result = 0;
         double eul = 0;
         double f = 0;
         double f1 = 0;
         double f2 = 0;
         double w = 0;

         eul = 0.5772156649015328606065;
         if ((double) (x) <= (double) (0))
         {
            result = 0;
            return result;
         }
         if ((double) (x) < (double) (2))
         {
            f1 = -5.350447357812542947283;
            f1 = f1 * x + 218.5049168816613393830;
            f1 = f1 * x - 4176.572384826693777058;
            f1 = f1 * x + 55411.76756393557601232;
            f1 = f1 * x - 331338.1331178144034309;
            f1 = f1 * x + 1592627.163384945414220;
            f2 = 1.000000000000000000000;
            f2 = f2 * x - 52.50547959112862969197;
            f2 = f2 * x + 1259.616186786790571525;
            f2 = f2 * x - 17565.49581973534652631;
            f2 = f2 * x + 149306.2117002725991967;
            f2 = f2 * x - 729494.9239640527645655;
            f2 = f2 * x + 1592627.163384945429726;
            f = f1 / f2;
            result = eul + Math.Log(x) + x * f;
            return result;
         }
         if ((double) (x) < (double) (4))
         {
            w = 1 / x;
            f1 = 1.981808503259689673238E-2;
            f1 = f1 * w - 1.271645625984917501326;
            f1 = f1 * w - 2.088160335681228318920;
            f1 = f1 * w + 2.755544509187936721172;
            f1 = f1 * w - 4.409507048701600257171E-1;
            f1 = f1 * w + 4.665623805935891391017E-2;
            f1 = f1 * w - 1.545042679673485262580E-3;
            f1 = f1 * w + 7.059980605299617478514E-5;
            f2 = 1.000000000000000000000;
            f2 = f2 * w + 1.476498670914921440652;
            f2 = f2 * w + 5.629177174822436244827E-1;
            f2 = f2 * w + 1.699017897879307263248E-1;
            f2 = f2 * w + 2.291647179034212017463E-2;
            f2 = f2 * w + 4.450150439728752875043E-3;
            f2 = f2 * w + 1.727439612206521482874E-4;
            f2 = f2 * w + 3.953167195549672482304E-5;
            f = f1 / f2;
            result = Math.Exp(x) * w * (1 + w * f);
            return result;
         }
         if ((double) (x) < (double) (8))
         {
            w = 1 / x;
            f1 = -1.373215375871208729803;
            f1 = f1 * w - 7.084559133740838761406E-1;
            f1 = f1 * w + 1.580806855547941010501;
            f1 = f1 * w - 2.601500427425622944234E-1;
            f1 = f1 * w + 2.994674694113713763365E-2;
            f1 = f1 * w - 1.038086040188744005513E-3;
            f1 = f1 * w + 4.371064420753005429514E-5;
            f1 = f1 * w + 2.141783679522602903795E-6;
            f2 = 1.000000000000000000000;
            f2 = f2 * w + 8.585231423622028380768E-1;
            f2 = f2 * w + 4.483285822873995129957E-1;
            f2 = f2 * w + 7.687932158124475434091E-2;
            f2 = f2 * w + 2.449868241021887685904E-2;
            f2 = f2 * w + 8.832165941927796567926E-4;
            f2 = f2 * w + 4.590952299511353531215E-4;
            f2 = f2 * w + -4.729848351866523044863E-6;
            f2 = f2 * w + 2.665195537390710170105E-6;
            f = f1 / f2;
            result = Math.Exp(x) * w * (1 + w * f);
            return result;
         }
         if ((double) (x) < (double) (16))
         {
            w = 1 / x;
            f1 = -2.106934601691916512584;
            f1 = f1 * w + 1.732733869664688041885;
            f1 = f1 * w - 2.423619178935841904839E-1;
            f1 = f1 * w + 2.322724180937565842585E-2;
            f1 = f1 * w + 2.372880440493179832059E-4;
            f1 = f1 * w - 8.343219561192552752335E-5;
            f1 = f1 * w + 1.363408795605250394881E-5;
            f1 = f1 * w - 3.655412321999253963714E-7;
            f1 = f1 * w + 1.464941733975961318456E-8;
            f1 = f1 * w + 6.176407863710360207074E-10;
            f2 = 1.000000000000000000000;
            f2 = f2 * w - 2.298062239901678075778E-1;
            f2 = f2 * w + 1.105077041474037862347E-1;
            f2 = f2 * w - 1.566542966630792353556E-2;
            f2 = f2 * w + 2.761106850817352773874E-3;
            f2 = f2 * w - 2.089148012284048449115E-4;
            f2 = f2 * w + 1.708528938807675304186E-5;
            f2 = f2 * w - 4.459311796356686423199E-7;
            f2 = f2 * w + 1.394634930353847498145E-8;
            f2 = f2 * w + 6.150865933977338354138E-10;
            f = f1 / f2;
            result = Math.Exp(x) * w * (1 + w * f);
            return result;
         }
         if ((double) (x) < (double) (32))
         {
            w = 1 / x;
            f1 = -2.458119367674020323359E-1;
            f1 = f1 * w - 1.483382253322077687183E-1;
            f1 = f1 * w + 7.248291795735551591813E-2;
            f1 = f1 * w - 1.348315687380940523823E-2;
            f1 = f1 * w + 1.342775069788636972294E-3;
            f1 = f1 * w - 7.942465637159712264564E-5;
            f1 = f1 * w + 2.644179518984235952241E-6;
            f1 = f1 * w - 4.239473659313765177195E-8;
            f2 = 1.000000000000000000000;
            f2 = f2 * w - 1.044225908443871106315E-1;
            f2 = f2 * w - 2.676453128101402655055E-1;
            f2 = f2 * w + 9.695000254621984627876E-2;
            f2 = f2 * w - 1.601745692712991078208E-2;
            f2 = f2 * w + 1.496414899205908021882E-3;
            f2 = f2 * w - 8.462452563778485013756E-5;
            f2 = f2 * w + 2.728938403476726394024E-6;
            f2 = f2 * w - 4.239462431819542051337E-8;
            f = f1 / f2;
            result = Math.Exp(x) * w * (1 + w * f);
            return result;
         }
         if ((double) (x) < (double) (64))
         {
            w = 1 / x;
            f1 = 1.212561118105456670844E-1;
            f1 = f1 * w - 5.823133179043894485122E-1;
            f1 = f1 * w + 2.348887314557016779211E-1;
            f1 = f1 * w - 3.040034318113248237280E-2;
            f1 = f1 * w + 1.510082146865190661777E-3;
            f1 = f1 * w - 2.523137095499571377122E-5;
            f2 = 1.000000000000000000000;
            f2 = f2 * w - 1.002252150365854016662;
            f2 = f2 * w + 2.928709694872224144953E-1;
            f2 = f2 * w - 3.337004338674007801307E-2;
            f2 = f2 * w + 1.560544881127388842819E-3;
            f2 = f2 * w - 2.523137093603234562648E-5;
            f = f1 / f2;
            result = Math.Exp(x) * w * (1 + w * f);
            return result;
         }
         w = 1 / x;
         f1 = -7.657847078286127362028E-1;
         f1 = f1 * w + 6.886192415566705051750E-1;
         f1 = f1 * w - 2.132598113545206124553E-1;
         f1 = f1 * w + 3.346107552384193813594E-2;
         f1 = f1 * w - 3.076541477344756050249E-3;
         f1 = f1 * w + 1.747119316454907477380E-4;
         f1 = f1 * w - 6.103711682274170530369E-6;
         f1 = f1 * w + 1.218032765428652199087E-7;
         f1 = f1 * w - 1.086076102793290233007E-9;
         f2 = 1.000000000000000000000;
         f2 = f2 * w - 1.888802868662308731041;
         f2 = f2 * w + 1.066691687211408896850;
         f2 = f2 * w - 2.751915982306380647738E-1;
         f2 = f2 * w + 3.930852688233823569726E-2;
         f2 = f2 * w - 3.414684558602365085394E-3;
         f2 = f2 * w + 1.866844370703555398195E-4;
         f2 = f2 * w - 6.345146083130515357861E-6;
         f2 = f2 * w + 1.239754287483206878024E-7;
         f2 = f2 * w - 1.086076102793126632978E-9;
         f = f1 / f2;
         result = Math.Exp(x) * w * (1 + w * f);
         return result;
      }
      public double exponentialintegralen(double x, int n)
      {
         double result = 0;
         double r = 0;
         double t = 0;
         double yk = 0;
         double xk = 0;
         double pk = 0;
         double pkm1 = 0;
         double pkm2 = 0;
         double qk = 0;
         double qkm1 = 0;
         double qkm2 = 0;
         double psi = 0;
         double z = 0;
         int i = 0;
         int k = 0;
         double big = 0;
         double eul = 0;

         eul = 0.57721566490153286060;
         big = 1.44115188075855872 * Math.Pow(10, 17);
         if (((n < 0 || (double) (x) < (double) (0)) || (double) (x) > (double) (170)) || ((double) (x) == (double) (0) && n < 2))
         {
            result = -1;
            return result;
         }
         if ((double) (x) == (double) (0))
         {
            result = (double) 1 / (double) (n - 1);
            return result;
         }
         if (n == 0)
         {
            result = Math.Exp(-x) / x;
            return result;
         }
         if (n > 5000)
         {
            xk = x + n;
            yk = 1 / (xk * xk);
            t = n;
            result = yk * t * (6 * x * x - 8 * t * x + t * t);
            result = yk * (result + t * (t - 2.0 * x));
            result = yk * (result + t);
            result = (result + 1) * Math.Exp(-x) / xk;
            return result;
         }
         if ((double) (x) <= (double) (1))
         {
            psi = -eul - Math.Log(x);
            for (i = 1; i <= n - 1; i++)
            {
               psi = psi + (double) 1 / (double) i;
            }
            z = -x;
            xk = 0;
            yk = 1;
            pk = 1 - n;
            if (n == 1)
            {
               result = 0.0;
            }
            else
            {
               result = 1.0 / pk;
            }
            do
            {
               xk = xk + 1;
               yk = yk * z / xk;
               pk = pk + 1;
               if ((double) (pk) != (double) (0))
               {
                  result = result + yk / pk;
               }
               if ((double) (result) != (double) (0))
               {
                  t = Math.Abs(yk / result);
               }
               else
               {
                  t = 1;
               }
            }
            while ((double) (t) >= (double) (0.000001));
            t = 1;
            for (i = 1; i <= n - 1; i++)
            {
               t = t * z / i;
            }
            result = psi * t - result;
            return result;
         }
         else
         {
            k = 1;
            pkm2 = 1;
            qkm2 = x;
            pkm1 = 1.0;
            qkm1 = x + n;
            result = pkm1 / qkm1;
            do
            {
               k = k + 1;
               if (k % 2 == 1)
               {
                  yk = 1;
                  xk = n + (double) (k - 1) / (double) 2;
               }
               else
               {
                  yk = x;
                  xk = (double) k / (double) 2;
               }
               pk = pkm1 * yk + pkm2 * xk;
               qk = qkm1 * yk + qkm2 * xk;
               if ((double) (qk) != (double) (0))
               {
                  r = pk / qk;
                  t = Math.Abs((result - r) / r);
                  result = r;
               }
               else
               {
                  t = 1;
               }
               pkm2 = pkm1;
               pkm1 = pk;
               qkm2 = qkm1;
               qkm1 = qk;
               if ((double) (Math.Abs(pk)) > (double) (big))
               {
                  pkm2 = pkm2 / big;
                  pkm1 = pkm1 / big;
                  qkm2 = qkm2 / big;
                  qkm1 = qkm1 / big;
               }
            }
            while ((double) (t) >= (double) (0.000001));
            result = result * Math.Exp(-x);
         }
         return result;
      }
   
      
}
```
      manager2 SIF
        ci = 250  # CO2 concentration within the intercellular air space
        tao = 50  # CO2 concentration at the compensation point
        p0 = 0.8  # The maximum photochemical yield
        j0 = 5  # The maximum possible electron transport rate
        KF = 0.05  # Fluorescence rate coefficients
        alpha = 2.83  # KN fitting parameter alpha
        beta = 0.114  # KN fitting parameter beta
        KN0 = 2.48  # KN fitting parameter KN0
        fesp = 0.35  # Probability of SIF escaping
```csharp
using System;
using ModelFramework;

public class Script 
{      
   [Link] Paddock MyPaddock; // Can be used to dynamically get access to simulation structure and variables
   [Input] DateTime Today;   // Equates to the value of the current simulation date - value comes from CLOCK
   [Input] double BIOshootDAY;
   [Input] double RootShoot;
   [Input] double mint;
   [Input] double maxt;
   [Input] double RadIntDcaps;
   [Input] double ratio;
   [Input] double [] ratioall;
   [Input] double LAI; 
   [Output] double A;
   [Output] double Je;
   [Output] double P;
   [Output] double X;
   [Output] double KN;
   [Output] double KD;
   [Output] double F;
   [Output] double Fsingle_spectral_tot;
   [Output] double Fsingle_spectral_toc;
 
 
   [Output] double Fyield;
   [Output] double [] TOT=new double [211];
   [Output] double i0;
   [Output] double fes = 0; 
   [Param] double ci;
   [Param] double tao;
   [Param] double p0;
   [Param] double j0;
   [Param] double KF;
   [Param] double alpha;
   [Param] double beta;
   [Param] double KN0;
   [Param] double fesp;


   // The following event handler will be called once at the beginning of the simulation
   [EventHandler] public void OnInitialised()
   {

   }

   // The following event handler will be called each day at the beginning of the day
   [EventHandler] public void OnPrepare()
   {          
      if(LAI>1)
      {
         
            
         A = BIOshootDAY * (1 + RootShoot) / 44 / 0.4;//The canopy-level photosynthesis
         Je = A * ((ci + tao * 2) / (ci - tao));//The actual electron transport rate
         P = p0 * Je / j0;//Photochemical quantum yield
         X = 1 - P / p0;//The degree of light saturation

         KN = (1 + beta) * Math.Pow(X, alpha) / (beta + Math.Pow(X, alpha)) * KN0;//Nonphotochemical quenching rate coefficients
         KD = 0.03 * (mint + maxt) / 2 + 0.0773;//Radiationless decay
         if (KD < 0.87)
         {
            KD = 0.87;
         }     

         F = KF / (KF + KN + KD) * (1 - P) * RadIntDcaps;//Emitted fluorescence ( MJ/m2)
         Fyield = F / RadIntDcaps;//  Fluorescence yield 
         F = F * 1000000 / (3600 * 24);//Unit conversion from MJ/m2 to W/m2
         Fsingle_spectral_tot = F * ratio;   //Total fluorescence emitted for single spectral (W/m2/nm)    
         Fsingle_spectral_toc = Fsingle_spectral_tot * fesp/ 3.14 * 1000;// Canopy fluorescence emitted for single spectral observed by the senor (mW/m2/nm/sr)
         Fsingle_spectral_tot = Fsingle_spectral_tot * 1000;//Unit mW/m2/nm  
      
        //Total emitted fluorescence for wavelengths of 640 to 850 nm, with 1 nm resolution (unit mW/m2/nm) 
         for(int i = 0;i < 211;i++)
         {
            TOT[i] = F * ratioall[i] * 1000;      
         }
      }
      

   }

}
```
  factorial Factorials: active=0
    settings
    factor
      targets: Target=/simulations/USsoybean/paddock/Photosynthesis
      vars: J=1.85,1,2.22
      manager2 Photosynthesis
        Vc = 1.1  # PM.Canopy.CPath.PsiVc
        J = 1.85  # PM.Canopy.CPath.PsiJ
        Rd = 0  # PM.Canopy.CPath.PsiRd
        Gm = 0.005296  # PM.Canopy.CPath.PsiGm
```csharp
using System;
using ModelFramework;
using LayerCanopyPhotosynthesis; //添加引用

 
public class Script 
{   
   [Param()] private double Vc;
   [Param()] private double J;
   [Param()] private double Rd;
   [Param()] private double Gm;
   [Link]  public Simulation MySimulation;
   [Link] Paddock MyPaddock; // Can be used to dynamically get access to simulation structure and variables
   [Input] DateTime Today;   // Equates to the value of the current simulation date - value comes from CLOCK
   [Output] public double[] dcaps = new double[4];
   
   //Additional Outputs
   [Output] public double BIOtotalDAY;
   [Output] public double BIOshootDAY;
   [Output] public double RootShoot;
   [Output] public double EcanDemand; 
   [Output] public double EcanSupply;
   [Output] public double RUE;
   [Output] public double TE; 
   [Output] public double RadIntDcaps; 
   
   
   
   
   public PhotosynthesisModel PM;
   public double LAITrigger;
   


   // The following event handler will be called once at the beginning of the simulation
   [EventHandler] public void OnInitialised()
   {
      string PhotosyntheticPathway = "C3"; //Change this to change pathway
            
      if(PhotosyntheticPathway == "C3")
      {
         PM = new LayerCanopyPhotosynthesis.PhotosynthesisModelC3();
         
         PM.Initialised = false;
         PM.photoPathway = LayerCanopyPhotosynthesis.PhotosynthesisModel.PhotoPathway.C3;

         PM.conductanceModel = LayerCanopyPhotosynthesis.PhotosynthesisModel.ConductanceModel.SIMPLE;
         PM.electronTransportModel = LayerCanopyPhotosynthesis.PhotosynthesisModel.ElectronTransportModel.EMPIRICAL;

         PM.Canopy.NLayers = 1;
         
         LAITrigger = 1.0;
         
         PM.B = 0.41;                                    //B-Biomass Conversion Coefficient
         PM.Canopy.LeafAngle = 60;                       //LeafAngle-Leaf Angle
         PM.Canopy.CPath.SLNRatioTop = 1.3;              //SLNRatioTop-SLNRatioTop
         
         PM.Canopy.CPath.PsiVc = Vc;                    //psiVc-Psi Vc 1.1
         PM.Canopy.CPath.PsiJ = J;                     //psiJ-Psi J 1.85
         PM.Canopy.CPath.PsiRd = Rd;                      //psiRd-Psi Rd
         
         PM.Canopy.CPath.PsiGm = Gm;               //0.005296
         PM.Canopy.CPath.CGm = 0.0;
         
         double PsiFactor = 1;                               //psiFactor-Psi Reduction Factor
         
         PM.Canopy.CPath.PsiVc *= PsiFactor;
         PM.Canopy.CPath.PsiJ *= PsiFactor;
         PM.Canopy.CPath.PsiRd *= PsiFactor;                   
         
         PM.Canopy.Ca = 370;                             //Ca-Atomospheric CO2 partial pressure
         PM.Canopy.CPath.CiCaRatio = 0.70;               //CiCaRatio-Ci/Ca Ratio (0 to calculate using Ci)
         PM.Canopy.CPath.StructuralN = 14;               //structuralN-Structural N
         PM.Canopy.Gbs_CO2 = 0.003;                      //gbs-Conductance to CO2 leakage from the bundle sheath to mesophyll
         
         PM.EnvModel.RPAR = 0.5;                         //R_PAR-Fraction of PAR energy to that of the total solar
         
         PM.Canopy.DiffuseExtCoeff = 0.78;               //kd_PAR-Diffuse PAR extinction coefficient
         PM.Canopy.DiffuseExtCoeffNIR = 0.8;             //kd_NIR-Diffuse NIR extinction coefficient
         PM.Canopy.LeafScatteringCoeff = 0.15;           //s_PAR-Leaf-level scattering coefficient for PAR
         PM.Canopy.LeafScatteringCoeffNIR = 0.8;         //s_NIR-Leaf-level scattering coefficient for NIR
         PM.Canopy.DiffuseReflectionCoeff = 0.036;       //rcd_PAR-Canopy-level reflection coefficient for diffuse PAR
         PM.Canopy.DiffuseReflectionCoeffNIR = 0.389;    //rcd_NIR-Canopy-level reflection coefficient for diffuse NIR
         
         PM.Canopy.OxygenPartialPressure = 210000;       //Ol-Oxygen partial pressure inside leaves in canopy
         
         PM.Canopy.U0 = 1.5;                               //u-Wind speed
         PM.Canopy.LeafWidth = 0.05;                     //wl-Leaf width
         PM.Canopy.Ku = 1.5;                             //kw-Wind speed profile distribution coefficient
         
         PM.Canopy.Theta = 0.7;                          //theta-empirical curvature factor
         PM.Canopy.F = 0.15;                             //f-spectral correction factor
         
         PM.Canopy.CPath.KcP25 = 273.422964228666;       //Kc_25-Michaelis Menten constants of Rubisco carboxylation at 25 degrees C
         PM.Canopy.CPath.KcTMin = 93720;                 //Kc_min-Minimum temperature of Kc
         
         PM.Canopy.CPath.KoP25 = 165824.064155384;       //Ko_25-Michaelis Menten constants of Rubisco oxygenation at 25 degrees C
         PM.Canopy.CPath.KoTMin = 33600;                 //Ko_min-Minimum temperature of Ko
         
         PM.Canopy.CPath.VcTMin = 65330;                 //Vcmax_min-Minimum temperature of Vcmax
         
         PM.Canopy.CPath.VcMax_VoMaxP25 = 4.59217066521612;    //VcmaxVomax_25-Vcmax/Vomax at 25 degrees C
         PM.Canopy.CPath.VcMax_VoMaxTMin = 35713.19871277176;   //VcmaxVomax_min-Minimum temperature of Vcmax/Vomax
         
         PM.Canopy.CPath.RdTMin = 46390;                 //Rd_min-Minimum temperature of Rd
       
         PM.Canopy.CPath.JTMin = 0.0;                    //Jmax_min-Minimum temperature of Jmax
         PM.Canopy.CPath.JTOpt = 30;                     //Jmax_opt-Optimum temperature of Jmax
         PM.Canopy.CPath.JTMax = 45;                     //Jmax_max-Maximum temperature of Jmax
         PM.Canopy.CPath.JMaxC = 0.911017958600129;      //Jmax_c-Scaling constant of Jamx
         PM.Canopy.CPath.JBeta = 1;                      //Jmax Beta value
         
       
         //PM.Canopy.CPath.GmP25 = 0.55;                   //gm_25-Mesophyll conductance for CO2 at 25 degrees C
         PM.Canopy.CPath.GmTMin = 0;                     //gm_min-Minimum temperature of gm
         PM.Canopy.CPath.GmTOpt = 29.2338417788683;                    //gm_opt-Optimum temperature of gm
         PM.Canopy.CPath.GmTMax = 45;                    //gm_max-Maximum temperature of gm
         PM.Canopy.CPath.GmC = 0.875790608584141;        //gm_c-Scaling constant of gm
         PM.Canopy.CPath.GmBeta = 1;                     //gm Beta value
         
      }
      else
      {
         PM = new LayerCanopyPhotosynthesis.PhotosynthesisModelC4();
         
         PM.Initialised = false;
         PM.photoPathway = LayerCanopyPhotosynthesis.PhotosynthesisModel.PhotoPathway.C4;

         PM.conductanceModel = LayerCanopyPhotosynthesis.PhotosynthesisModel.ConductanceModel.SIMPLE;
         PM.electronTransportModel = LayerCanopyPhotosynthesis.PhotosynthesisModel.ElectronTransportModel.EMPIRICAL;

         PM.Canopy.NLayers = 1;
         
         LAITrigger = 1;
         
         PM.B = 0.41;                                   //B-Biomass Conversion Coefficient
         
         PM.Canopy.LeafAngle = 60;                       //LeafAngle-Leaf Angle
         PM.Canopy.CPath.SLNRatioTop = 1.3;              //SLNRatioTop-SLNRatioTop
         
         PM.Canopy.CPath.PsiVc = 0.465;                  //psiVc-Psi Vc
         PM.Canopy.CPath.PsiJ = 2.7;                     //psiJ-Psi J
         PM.Canopy.CPath.PsiRd = 0;                      //psiRd-Psi Rd
         PM.Canopy.CPath.PsiVp = 1.55;                   //psiVp-Psi Vp (C4)
         
         PM.Canopy.CPath.PsiGm = 0;
         PM.Canopy.CPath.CGm = 1.2;
         
         double PsiFactor = 0.4;                         //psiFactor-Psi Reduction Factor
         
         PM.Canopy.CPath.PsiVc *= PsiFactor;
         PM.Canopy.CPath.PsiJ *= PsiFactor;
         PM.Canopy.CPath.PsiRd *= PsiFactor;
         PM.Canopy.CPath.PsiVp *= PsiFactor;
         
         
         PM.Canopy.Ca = 363;                             //Ca-Atomospheric CO2 partial pressure
         PM.Canopy.Vpr_l = 120;                          //Vpr-PEP regeneration rate per unit leaf area at 25°C (C4)
         PM.Canopy.CPath.CiCaRatio = 0.45;               //CiCaRatio-Ci/Ca Ratio (0 to calculate using Ci)
         PM.Canopy.CPath.StructuralN = 14;               //structuralN-Structural N
         
         PM.EnvModel.RPAR = 0.5;                         //R_PAR-Fraction of PAR energy to that of the total solar
         
         PM.Canopy.Gbs_CO2 = 0.003;                      //gbs-Conductance to CO2 leakage from the bundle sheath to mesophyll
         
         PM.Canopy.DiffuseExtCoeff = 0.78;               //kd_PAR-Diffuse PAR extinction coefficient
         PM.Canopy.DiffuseExtCoeffNIR = 0.8;             //kd_NIR-Diffuse NIR extinction coefficient
         PM.Canopy.LeafScatteringCoeff = 0.15;           //s_PAR-Leaf-level scattering coefficient for PAR
         PM.Canopy.LeafScatteringCoeffNIR = 0.8;         //s_NIR-Leaf-level scattering coefficient for NIR
         PM.Canopy.DiffuseReflectionCoeff = 0.036;       //rcd_PAR-Canopy-level reflection coefficient for diffuse PAR
         PM.Canopy.DiffuseReflectionCoeffNIR = 0.389;    //rcd_NIR-Canopy-level reflection coefficient for diffuse NIR
         
         PM.Canopy.OxygenPartialPressure = 210000;       //Ol-Oxygen partial pressure inside leaves in canopy
         
         PM.Canopy.U0 = 1.5;                               //u-Wind speed
         PM.Canopy.LeafWidth = 0.15;                     //wl-Leaf width
         PM.Canopy.Ku = 1.5;                             //kw-Wind speed profile distribution coefficient
         
         PM.Canopy.Theta = 0.7;                          //theta-empirical curvature factor
         PM.Canopy.F = 0.15;                             //f-spectral correction factor
         PM.Canopy.Alpha = 0.1;                          //alpha-fraction of PSII activity in the bundle sheath (C4)
         PM.Canopy.CPath.Phi = 2.0;                      //phi-extra energy (ATP) cost required from processes other than the C3 cycle
         PM.Canopy.X = PM.Canopy.CPath.Phi / (3 + PM.Canopy.CPath.Phi); //x-fraction of electron transport partitioned to mesophyll chloroplasts (C4)
         
         PM.Canopy.CPath.KcP25 = 1210;                   //Kc_25-Michaelis Menten constants of Rubisco carboxylation at 25 degrees C
         PM.Canopy.CPath.KcTMin = 64200;                 //Kc_min-Minimum temperature of Kc
         
         PM.Canopy.CPath.KoP25 = 292000;                 //Ko_25-Michaelis Menten constants of Rubisco oxygenation at 25 degrees C
         PM.Canopy.CPath.KoTMin = 10500;                 //Ko_min-Minimum temperature of Ko
            
         PM.Canopy.CPath.VcTMin = 78000;                 //Vcmax_min-Minimum temperature of Vcmax
          
         PM.Canopy.CPath.VcMax_VoMaxP25 = 5.51328906454566;    //VcmaxVomax_25-Vcmax/Vomax at 25 degrees C
         PM.Canopy.CPath.VcMax_VoMaxTMin = 21265.4029552906;   //VcmaxVomax_min-Minimum temperature of Vcmax/Vomax
           
         PM.Canopy.CPath.KpP25 = 75;                    //Kp_25-Michaelis-Menten constant of PEP carboxylation at 25 degrees C (C4)
         PM.Canopy.CPath.KpTMin = 36300;                 //Kp_min-Minimum temperature of Kp (C4)
            
         PM.Canopy.CPath.VpMaxTMin = 57043.2677590512;   //Vpmax_min-Minimum temperature of Vpmax (C4)
           
         PM.Canopy.CPath.RdTMin = 46390;                 //Rd_min-Minimum temperature of Rd
         
         PM.Canopy.CPath.JTMin = 0;                      //Jmax_min-Minimum temperature of Jmax
         PM.Canopy.CPath.JTOpt = 37.8649150880407;       //Jmax_opt-Optimum temperature of Jmax
         PM.Canopy.CPath.JTMax = 55;                     //Jmax_max-Maximum temperature of Jmax
         PM.Canopy.CPath.JMaxC = 0.711229539802063;      //Jmax_c-Scaling constant of Jamx
         PM.Canopy.CPath.JBeta = 1;
         
         //PM.Canopy.CPath.GmP25 = 1.2;                   //gm_25-Mesophyll conductance for CO2 at 25 degrees C
         PM.Canopy.CPath.GmTMin = 0;                     //gm_min-Minimum temperature of gm
         PM.Canopy.CPath.GmTOpt = 42;                    //gm_opt-Optimum temperature of gm
         PM.Canopy.CPath.GmTMax = 55;                    //gm_max-Maximum temperature of gm
         PM.Canopy.CPath.GmC = 0.462820450976839;        //gm_c-Scaling constant of gm
         PM.Canopy.CPath.GmBeta = 1;
         
          
        
      }
      //Set the LAI trigger
      MyPaddock.Set("laiTrigger", LAITrigger);
      //Set the LAI trigger
      MyPaddock.Set("laiTrigger", LAITrigger);
   }
   // This routine is called when the plant model wants us to do the calculation
   //[EventHandler] public void Ondodcaps(CalcDCaPType c) {
   [EventHandler] public void Ondodcaps() {
      //      ApsimC3PhotoLink p = new ApsimC3PhotoLink();
      //      dcap = p.Calc(c.doy, c.latitude, c.maxT, c.minT, c.radn, c.lai, c.sln, c.soilWaterAvail);
      //
      
      int DOY = 0;
      double latitude = 0;
      double maxT = 0;
      double minT = 0;
      double radn = 0;
      double RootShootRatio = 0;
      double SLNDCaPS = 0;
      double SWAvailable = 0;
      double lai = 0;
      double a=Math.Sqrt(9);
     
      MyPaddock.Get("DOY", out DOY);
      MyPaddock.Get("latitude", out latitude);
      MyPaddock.Get("maxT", out maxT);
      MyPaddock.Get("minT", out minT);
      MyPaddock.Get("radn", out radn);
      MyPaddock.Get("RootShootRatio", out RootShootRatio);
      MyPaddock.Get("SLN", out SLNDCaPS);
      MyPaddock.Get("SWAvailable", out SWAvailable);
      MyPaddock.Get("lai", out lai);
      
      //Check
      //            Console.WriteLine("DCaps Input Manager--------------");
      //            Console.WriteLine("DOY = " + DOY.ToString());
      //            Console.WriteLine("latitude = " + latitude.ToString());
      //            Console.WriteLine("maxT = " + maxT.ToString());
      //            Console.WriteLine("minT = " + minT.ToString());
      //            Console.WriteLine("radn = " + radn.ToString());
      //            Console.WriteLine("RootShootRatio = " + RootShootRatio.ToString());
      //            Console.WriteLine("SLNDCaPS = " + SLNDCaPS.ToString());
      //            Console.WriteLine("SWAvailable = " + SWAvailable.ToString());
      //            Console.WriteLine("lai = " + lai.ToString());
      //            Console.WriteLine("DCaps Input Manager--------------");
      
      //public override double[] RunApsim(int DOY, double latitude, double maxT, double minT, double radn, double lai, double SLNDCaPS, double soilWaterAvail, double RootShootRatio)
        
      dcaps = PM.RunApsim(DOY, latitude, maxT, minT, radn, lai, SLNDCaPS, SWAvailable, RootShootRatio);
      
      //Additional outputs
      RootShoot = RootShootRatio;
      BIOshootDAY = dcaps[0];
      BIOtotalDAY = BIOshootDAY * (1 + RootShoot);
      EcanDemand = dcaps[1]; 
      EcanSupply = dcaps[2];
      RadIntDcaps = dcaps[3];
      RUE = BIOshootDAY / RadIntDcaps;
      TE = BIOshootDAY / EcanSupply; 
      
      
      
      //Check Outputs
      //      Console.WriteLine("DCaps Out Manager--------------");
      //      Console.WriteLine("1 = " + dcaps[0].ToString());
      //      Console.WriteLine("2 = " + dcaps[1].ToString());
      //      Console.WriteLine("3 = " + dcaps[2].ToString());
      //      Console.WriteLine("4 = " + dcaps[3].ToString());
      //      Console.WriteLine("DCaps Out Manager--------------");
      //      
      
   }
   // After we've done the calculation, the result is here
      
   // Set its default value to garbage so that we find out quickly
   [EventHandler] public void OnPrepare()
   {
      for(int i = 0; i < 4; i++) { dcaps[i] = -1.0f;}
   }
}
```
        Reference
          ref = %apsim%/Model/DCaPST.dll  # Path to assembly
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